// SBML level 2 version 3

model base()

  // Compartments:
  compartment cell = 1;

  // Species:
  species EGF in cell = 0;
  species NGF in cell = 0;
  species freeEGFReceptor in cell;
  species boundEGFReceptor in cell = 0;
  species freeNGFReceptor in cell;
  species boundNGFReceptor in cell = 0;
  species SosInactive in cell;
  species SosActive in cell = 0;
  species P90RskInactive in cell;
  species P90RskActive in cell = 0;
  species RasInactive in cell;
  species RasActive in cell = 0;
  species RasGapActive in cell;
  species Raf1Inactive in cell;
  species Raf1Active in cell = 0;
  species BRafInactive in cell;
  species BRafActive in cell = 0;
  species MekInactive in cell;
  species MekActive in cell = 0;
  species ErkInactive in cell;
  species ErkActive in cell = 0;
  species PI3KInactive in cell;
  species PI3KActive in cell = 0;
  species AktInactive in cell;
  species AktActive in cell = 0;
  species C3GInactive in cell;
  species C3GActive in cell = 0;
  species Rap1Inactive in cell;
  species Rap1Active in cell = 0;
  species RapGapActive in cell;
  species PP2AActive in cell;
  species Raf1PPtase in cell;
  species RasPI3K in cell = 0;
  species Raf1PPtaseRaf1 in cell = 0;
  species BRafMek in cell = 0;
  species boundNGFReceptorC3G in cell = 0;
  species P90RskSos in cell = 0;
  species Raf1PPtaseBRaf in cell = 0;
  species RasGapRas in cell = 0;
  species ErkP90Rsk in cell = 0;
  species RasRaf1 in cell = 0;
  species MekErk in cell = 0;
  species RapGapRap1 in cell = 0;
  species AktRaf1 in cell = 0;
  species C3GRap1 in cell = 0;
  species Raf1Mek in cell = 0;
  species SosRas in cell = 0;
  species boundEGFReceptorPI3K in cell = 0;
  species boundEGFReceptorSos in cell = 0;
  species boundNGFReceptorSos in cell = 0;
  species Rap1BRaf in cell = 0;
  species PP2AMek in cell = 0;
  species PP2AErk in cell = 0;
  species PI3KAkt in cell = 0;

  // Parameters:
  RasGapTotal = 1;
  RapGapTotal = 1;
  PP2ATotal = 1;
  Raf1PPtaseTotal = 1;
  EGF_IC = 1;
  NGF_IC = 1;
  Total_EGFReceptor = 1;
  Total_NGFReceptor = 1;
  Total_Sos = 1;
  Total_P90Rsk = 1;
  Total_Ras = 1;
  Total_Raf1 = 1;
  Total_BRaf = 1;
  Total_Mek = 1;
  Total_Erk = 1;
  Total_PI3K = 1;
  Total_Akt = 1;
  Total_C3G = 1;
  Total_Rap1 = 1;
  k00f = 1;
  k00b = 1;
  k01f = 1;
  k01b = 1;
  k02f = 1;
  k02b = 1;
  k03f = 1;
  k04f = 1;
  k04b = 1;
  k05f = 1;
  k06f = 1;
  k06b = 1;
  k07f = 1;
  k08f = 1;
  k08b = 1;
  k09f = 1;
  k10f = 1;
  k10b = 1;
  k11f = 1;
  k12f = 1;
  k12b = 1;
  k13f = 1;
  k14f = 1;
  k14b = 1;
  k15f = 1;
  k16f = 1;
  k16b = 1;
  k17f = 1;
  k18f = 1;
  k18b = 1;
  k19f = 1;
  k20f = 1;
  k20b = 1;
  k21f = 1;
  k22f = 1;
  k22b = 1;
  k23f = 1;
  k24f = 1;
  k24b = 1;
  k25f = 1;
  k26f = 1;
  k26b = 1;
  k27f = 1;
  k28f = 1;
  k28b = 1;
  k29f = 1;
  k30f = 1;
  k30b = 1;
  k31f = 1;
  k42f = 1;
  k42b = 1;
  k43f = 1;
  k44f = 1;
  k44b = 1;
  k45f = 1;

  // Reactions:
  EGFBindingReaction: EGF + freeEGFReceptor -> boundEGFReceptor; k00f*EGF*freeEGFReceptor;
  EGFUnbindingReaction: boundEGFReceptor -> EGF + freeEGFReceptor; k00b*boundEGFReceptor;
  NGFBindingReaction: NGF + freeNGFReceptor -> boundNGFReceptor; k01f*NGF*freeNGFReceptor;
  NGFUnbindingReaction: boundNGFReceptor -> NGF + freeNGFReceptor; k01b*boundNGFReceptor;
  boundEGFReceptorSosBindingReaction: boundEGFReceptor + SosInactive -> boundEGFReceptorSos; k02f*boundEGFReceptor*SosInactive;
  boundEGFReceptorSosUnbindingReaction: boundEGFReceptorSos -> boundEGFReceptor + SosInactive; k02b*boundEGFReceptorSos;
  SosActivationByEGFReaction: boundEGFReceptorSos -> boundEGFReceptor + SosActive; k03f*boundEGFReceptorSos;
  boundNGFReceptorSosBindingReaction: boundNGFReceptor + SosInactive -> boundNGFReceptorSos; k04f*boundNGFReceptor*SosInactive;
  boundNGFReceptorSosUnbindingReaction: boundNGFReceptorSos -> boundNGFReceptor + SosInactive; k04b*boundNGFReceptorSos;
  SosActivationByNGFReaction: boundNGFReceptorSos -> boundNGFReceptor + SosActive; k05f*boundNGFReceptorSos;
  P90RskSosBindingReaction: SosActive + P90RskActive -> P90RskSos; k06f*P90RskActive*SosActive;
  P90RskSosUnbindingReaction: P90RskSos -> SosActive + P90RskActive; k06b*P90RskSos;
  SosInactivationByP90RskReaction: P90RskSos -> SosInactive + P90RskActive; k07f*P90RskSos;
  ErkP90RskBindingReaction: ErkActive + P90RskInactive -> ErkP90Rsk; k08f*ErkActive*P90RskInactive;
  ErkP90RskUnbindingReaction: ErkP90Rsk -> ErkActive + P90RskInactive; k08b*ErkP90Rsk;
  P90RskActivationByErkReaction: ErkP90Rsk -> ErkActive + P90RskActive; k09f*ErkP90Rsk;
  SosRasBindingReaction: RasInactive + SosActive -> SosRas; k10f*SosActive*RasInactive;
  SosRasUnbindingReaction: SosRas -> RasInactive + SosActive; k10b*SosRas;
  RasActivationBySosReaction: SosRas -> RasActive + SosActive; k11f*SosRas;
  RasGapRasBindingReaction: RasGapActive + RasActive -> RasGapRas; k12f*RasGapActive*RasActive;
  RasGapRasUnbindingReaction: RasGapRas -> RasGapActive + RasActive; k12b*RasGapRas;
  RasInactivationByRasGapReaction: RasGapRas -> RasGapActive + RasInactive; k13f*RasGapRas;
  RasRaf1BindingReaction: RasActive + Raf1Inactive -> RasRaf1; k14f*RasActive*Raf1Inactive;
  RasRaf1UnbindingReaction: RasRaf1 -> RasActive + Raf1Inactive; k14b*RasRaf1;
  Raf1ActivationByRasReaction: RasRaf1 -> Raf1Active + RasActive; k15f*RasRaf1;
  Raf1PPtaseRaf1BindingReaction: Raf1PPtase + Raf1Active -> Raf1PPtaseRaf1; k16f*Raf1PPtase*Raf1Active;
  Raf1PPtaseRaf1UnbindingReaction: Raf1PPtaseRaf1 -> Raf1PPtase + Raf1Active; k16b*Raf1PPtaseRaf1;
  Raf1InactivationByRaf1PPtaseReaction: Raf1PPtaseRaf1 -> Raf1PPtase + Raf1Inactive; k17f*Raf1PPtaseRaf1;
  AktRaf1BindingReaction: AktActive + Raf1Active -> AktRaf1; k18f*AktActive*Raf1Active;
  AktRaf1UnbindingReaction: AktRaf1 -> AktActive + Raf1Active; k18b*AktRaf1;
  Raf1InactivationByAktReaction: AktRaf1 -> AktActive + Raf1Inactive; k19f*AktRaf1;
  Rap1BRafBindingReaction: BRafInactive + Rap1Active -> Rap1BRaf; k20f*Rap1Active*BRafInactive;
  Rap1BRafUnbindingReaction: Rap1BRaf -> BRafInactive + Rap1Active; k20b*Rap1BRaf;
  BRafActivationByRap1Reaction: Rap1BRaf -> BRafActive + Rap1Active; k21f*Rap1BRaf;
  Raf1PPtaseBRafBindingReaction: Raf1PPtase + BRafActive -> Raf1PPtaseBRaf; k22f*Raf1PPtase*BRafActive;
  Raf1PPtaseBRafUnbindingReaction: Raf1PPtaseBRaf -> Raf1PPtase + BRafActive; k22b*Raf1PPtaseBRaf;
  BRafInactivationByRaf1PPtaseReaction: Raf1PPtaseBRaf -> BRafInactive + Raf1PPtase; k23f*Raf1PPtaseBRaf;
  Raf1MekBindingReaction: MekInactive + Raf1Active -> Raf1Mek; k24f*Raf1Active*MekInactive;
  Raf1MekUnbindingReaction: Raf1Mek -> MekInactive + Raf1Active; k24b*Raf1Mek;
  MekActivationByRaf1Reaction: Raf1Mek -> MekActive + Raf1Active; k25f*Raf1Mek;
  BRafMekBindingReaction: MekInactive + BRafActive -> BRafMek; k26f*BRafActive*MekInactive;
  BRafMekUnbindingReaction: BRafMek -> MekInactive + BRafActive; k26b*BRafMek;
  MekActivationByBRafReaction: BRafMek -> MekActive + BRafActive; k27f*BRafMek;
  PP2AMekBindingReaction: MekActive + PP2AActive -> PP2AMek; k28f*PP2AActive*MekActive;
  PP2AMekUnbindingReaction: PP2AMek -> MekActive + PP2AActive; k28b*PP2AMek;
  MekInactivationByPP2AReaction: PP2AMek -> MekInactive + PP2AActive; k29f*PP2AMek;
  MekErkBindingReaction: MekActive + ErkInactive -> MekErk; k30f*MekActive*ErkInactive;
  MekErkUnbindingReaction: MekErk -> MekActive + ErkInactive; k30b*MekErk;
  ErkActivationByMekReaction: MekErk -> MekActive + ErkActive; k31f*MekErk;
  PP2AErkBindingReaction: ErkActive + PP2AActive -> PP2AErk; k32f*PP2AActive*ErkActive;
  PP2AErkUnbindingReaction: PP2AErk -> ErkActive + PP2AActive; k32b*PP2AErk;
  ErkInactivationByPP2AReaction: PP2AErk -> ErkInactive + PP2AActive; k33f*PP2AErk;
  boundEGFReceptorPI3KBindingReaction: PI3KInactive + boundEGFReceptor -> boundEGFReceptorPI3K; k34f*boundEGFReceptor*PI3KInactive;
  boundEGFReceptorPI3KUnbindingReaction: boundEGFReceptorPI3K -> PI3KInactive + boundEGFReceptor; k34b*boundEGFReceptorPI3K;
  PI3KActivationByEGFReaction: boundEGFReceptorPI3K -> boundEGFReceptor + PI3KActive; k35f*boundEGFReceptorPI3K;
  RasPI3KBindingReaction: PI3KInactive + RasActive -> RasPI3K; k36f*RasActive*PI3KInactive;
  RasPI3KUnbindingReaction: RasPI3K -> PI3KInactive + RasActive; k36b*RasPI3K;
  PI3KActivationByRasReaction: RasPI3K -> PI3KActive + RasActive; k37f*RasPI3K;
  PI3KAktBindingReaction: PI3KActive + AktInactive -> PI3KAkt; k38f*PI3KActive*AktInactive;
  PI3KAktUnbindingReaction: PI3KAkt -> PI3KActive + AktInactive; k38b*PI3KAkt;
  AktActivationByPI3KReaction: PI3KAkt -> PI3KActive + AktActive; k39f*PI3KAkt;
  boundNGFReceptorC3GBindingReaction: boundNGFReceptor + C3GInactive -> boundNGFReceptorC3G; k40f*boundNGFReceptor*C3GInactive;
  boundNGFReceptorC3GUnbindingReaction: boundNGFReceptorC3G -> boundNGFReceptor + C3GInactive; k40b*boundNGFReceptorC3G;
  C3GActivationByNGFReaction: boundNGFReceptorC3G -> boundNGFReceptor + C3GActive; k41f*boundNGFReceptorC3G;
  C3GRap1BindingReaction: Rap1Inactive + C3GActive -> C3GRap1; k42f*C3GActive*Rap1Inactive;
  C3GRap1UnbindingReaction: C3GRap1 -> Rap1Inactive + C3GActive; k42b*C3GRap1;
  Rap1ActivationByC3GReaction: C3GRap1 -> Rap1Active + C3GActive; k43f*C3GRap1;
  RapGapRap1BindingReaction: RapGapActive + Rap1Active -> RapGapRap1; k44f*RapGapActive*Rap1Active;
  RapGapRap1UnbindingReaction: RapGapRap1 -> RapGapActive + Rap1Active; k44b*RapGapRap1;
  Rap1InactivationByRapGapReaction: RapGapRap1 -> Rap1Inactive + RapGapActive; k45f*RapGapRap1;
end
